Fri Jan 29 10:37:58 CET 2016
$PROBLEM    MOXONIDINE PK ANALYSIS
$INPUT      ID VISI XAT2=DROP DGRP DOSE FLAG=DROP ONO=DROP XIME=DROP
            DVO=DROP NEUY SCR AGE SEX NYH=DROP WT DROP ACE DIG DIU
            NUMB=DROP TAD TIME VIDD=DROP CRCL AMT SS II DROP CMT=DROP
            CONO=DROP DV EVID=DROP OVID=DROP
$DATA      mox_simulated.csv IGNORE=@
$ABBREVIATED DERIV2=NO COMRES=6
$SUBROUTINE ADVAN2 TRANS1
$PK
;----------IOV--------------------

   KPLAG = 0

   TVCL  = THETA(1)
   TVV   = THETA(2)
   TVKA  = THETA(3)

   CL    = TVCL*EXP(ETA(1))
   V     = TVV*EXP(ETA(2))
   KA    = TVKA*EXP(ETA(3))
   LAG   = THETA(4)
   PHI   = LOG(LAG/(1-LAG))
   ALAG1 = EXP(PHI+KPLAG)/(1+EXP(PHI+KPLAG))
   K     = CL/V
   S2    = V

$ERROR

     IPRED = LOG(.025)
     W     = THETA(5)
     IF(F.GT.0) IPRED = LOG(F)
     IRES  = IPRED-DV
     IWRES = IRES/W
     Y     = IPRED+ERR(1)*W

$THETA  (0,27.5)
 (0,13)
 (0,0.2)
$THETA  (0,0.077) ; LAG
$THETA  (0,.23) ; W
$OMEGA  BLOCK(2)
 .3
 .1 .3
$OMEGA  BLOCK(1)
 .3  ;         KA
$SIGMA  1  FIX
$ESTIMATION MAXEVALS=9990 PRINT=10 METHOD=CONDITIONAL
;$COV

NM-TRAN MESSAGES
 WARNINGS AND ERRORS (IF ANY) FOR PROBLEM    1
 (WARNING  2) NM-TRAN INFERS THAT THE DATA ARE POPULATION.

1NONLINEAR MIXED EFFECTS MODEL PROGRAM (NONMEM) VERSION 7.4.0 alpha6 (nm74a6)
 ORIGINALLY DEVELOPED BY STUART BEAL, LEWIS SHEINER, AND ALISON BOECKMANN
 CURRENT DEVELOPERS ARE ROBERT BAUER, ICON DEVELOPMENT SOLUTIONS,
 AND ALISON BOECKMANN. IMPLEMENTATION, EFFICIENCY, AND STANDARDIZATION
 PERFORMED BY NOUS INFOSYSTEMS.
 PROBLEM NO.:         1
 MOXONIDINE PK ANALYSIS
 TOT. NO. OF OBS RECS:     1022
 TOT. NO. OF INDIVIDUALS:     74
 ONE COMPARTMENT MODEL WITH FIRST-ORDER ABSORPTION (ADVAN2)
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 #TBLN:      1
 #METH: First Order Conditional Estimation
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
 #TERM:
0MINIMIZATION SUCCESSFUL
 NO. OF FUNCTION EVALUATIONS USED:      189
 NO. OF SIG. DIGITS IN FINAL EST.:  3.1

 ETABAR IS THE ARITHMETIC MEAN OF THE ETA-ESTIMATES,
 AND THE P-VALUE IS GIVEN FOR THE NULL HYPOTHESIS THAT THE TRUE MEAN IS 0.

 ETABAR:         8.0531E-04  2.3559E-02  1.4308E-02
 SE:             7.3778E-02  1.1509E-01  5.1252E-02
 N:                      74          74          74

 P VAL.:         9.9129E-01  8.3781E-01  7.8011E-01

 ETAshrink(%):   4.8469E-01  5.5206E+00  5.7675E+00
 EBVshrink(%):   1.1743E+00  5.1642E+00  5.0741E+00
 EPSshrink(%):   8.6829E+00

 #TERE:
 Elapsed estimation  time in seconds:     5.31
 Elapsed postprocess time in seconds:     0.00

 ********************                        FIRST ORDER CONDITIONAL ESTIMATION                      ********************
 #OBJT:**************                       MINIMUM VALUE OF OBJECTIVE FUNCTION                      ********************
 #OBJV:********************************************     -644.376       **************************************************

 ********************                        FIRST ORDER CONDITIONAL ESTIMATION                      ********************
 ********************                             FINAL PARAMETER ESTIMATE                           ********************

 THETA - VECTOR OF FIXED EFFECTS PARAMETERS   *********
         TH 1      TH 2      TH 3      TH 4      TH 5
         3.29E+01  2.10E+01  2.83E-01  9.58E-02  3.35E-01

 OMEGA - COV MATRIX FOR RANDOM EFFECTS - ETAS  ********
         ETA1      ETA2      ETA3
 ETA1
+        4.12E-01
 ETA2
+        6.17E-01  1.11E+00
 ETA3
+        0.00E+00  0.00E+00  2.22E-01

 SIGMA - COV MATRIX FOR RANDOM EFFECTS - EPSILONS  ****
         EPS1
 EPS1
+        1.00E+00

 OMEGA - CORR MATRIX FOR RANDOM EFFECTS - ETAS  *******
         ETA1      ETA2      ETA3
 ETA1
+        6.42E-01
 ETA2
+        9.11E-01  1.06E+00
 ETA3
+        0.00E+00  0.00E+00  4.71E-01

 SIGMA - CORR MATRIX FOR RANDOM EFFECTS - EPSILONS  ***
         EPS1
 EPS1
+        1.00E+00
 #CPUT: Total CPU Time in Seconds,        5.260
